*Heading
** Job name: Job-3 Model name: Model-1
** Generated by: Abaqus/CAE Learning Edition 2024
*Preprint, echo=NO, model=NO, history=NO, contact=NO
**
** PARTS
**
*Part, name=Part-3
*Node
      1,        -600.,         150.,         710.
      2,        -600.,         150.,         750.
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*Element, type=S4
 1,  1,  2, 69, 92
 2, 92, 69, 70, 91
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*Element, type=S3
667,  80,   8,  11
668, 748, 744,  11
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*Nset, nset=Set-1, generate
   1,  783,    1
*Elset, elset=Set-1, generate
   1,  754,    1
*Nset, nset=Set-2
   1,   2,   3,   4,   5,   6
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*Elset, elset=Set-2
   1,   2,   3,   4,   5,   6
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*Nset, nset=Set-3
   1,   2,   3,   4,   5,   6
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*Elset, elset=Set-3
   1,   2,   3,   4,   5,   6
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*Nset, nset=Set-4
   1,   2,   3,   4,   5,   6
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*Elset, elset=Set-4
   1,   2,   3,   4,   5,   6
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** Section: transversal
*Shell Section, elset=Set-4, material=Material-1
10., 5
** Region: (longitudinal:Set-3)
*Elset, elset=_I2, internal
  27,  28,  29,  30,  31,  32
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** Section: longitudinal
*Shell Section, elset=_I2, material=Material-1
7., 5
** Region: (fundo:Set-2)
*Elset, elset=_I3, internal
 147, 148, 149, 150, 151, 152
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** Section: fundo
*Shell Section, elset=_I3, material=Material-1
10., 5
*End Part
**
**
** ASSEMBLY
**
*Assembly, name=Assembly
**
*Instance, name=Part-3-1, part=Part-3
*End Instance
**
*Node
      1,        -100.,           0.,        1500.
*Node
      2,        -100.,           0.,           0.
*Nset, nset=left, instance=Part-3-1
   9,  10,  12,  15,  16,  21
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*Elset, elset=left, instance=Part-3-1
  36,  46,  56,  85,  86,  96
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*Nset, nset=rigth, instance=Part-3-1
  18,  19,  27,  28,  34,  35
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*Elset, elset=rigth, instance=Part-3-1
  66, 106, 126, 195, 196, 274
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*Nset, nset=_PickedSet14, internal
 2,
*Nset, nset=_PickedSet15, internal
 1,
*Nset, nset=_PickedSet17, internal
 1,
*Nset, nset=_PickedSet18, internal
 2,
*Elset, elset=__PickedSurf16_SPOS, internal, instance=Part-3-1
 147, 148, 149, 150, 151, 152
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*Surface, type=ELEMENT, name=_PickedSurf16, internal
__PickedSurf16_SPOS, SPOS
** Constraint: Constraint-1
*Rigid Body, ref node=_PickedSet14, tie nset=left
** Constraint: Constraint-2
*Rigid Body, ref node=_PickedSet15, tie nset=rigth
*End Assembly
**
** MATERIALS
**
*Material, name=Material-1
*Elastic
206000., 0.3
**
** BOUNDARY CONDITIONS
**
** Name: BC-1 Type: Displacement/Rotation
*Boundary
rigth, 1, 1
rigth, 2, 2
rigth, 3, 3
rigth, 5, 5
rigth, 6, 6
** Name: BC-2 Type: Displacement/Rotation
*Boundary
left, 1, 1
left, 2, 2
left, 3, 3
left, 4, 4
left, 5, 5
left, 6, 6
** ----------------------------------------------------------------
**
** STEP: Step-1
**
*Step, name=Step-1, nlgeom=NO
*Static
1., 1., 1e-05, 1.
**
** LOADS
**
** Name: Load-r12   Type: Moment
*Cload
_PickedSet17, 4, -100000.
** Name: Load-r22   Type: Moment
*Cload
_PickedSet18, 4, 100000.
**
** OUTPUT REQUESTS
**
*Restart, write, frequency=0
**
** FIELD OUTPUT: F-Output-1
**
*Output, field, variable=PRESELECT
**
** HISTORY OUTPUT: H-Output-1
**
*Output, history, variable=PRESELECT
*End Step
