*Heading
** Job name: Job-HSM2 Model name: Suezmax
** Generated by: Abaqus/CAE 2024
*Preprint, echo=NO, model=NO, history=NO, contact=NO
**
** PARTS
**
*Part, name=HoldCargo
*Node
      1,   24.3850002,   18.6450005,         31.5
      2,   24.3850002,   18.6450005,        29.75
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*Element, type=S4R
1,    1, 8492, 8493,    4
2, 8492,    2,    3, 8493
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*Nset, nset=t30
   492,   493,   509,   510,   532,   533
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*Elset, elset=t30
   861,   862,   863,   864,   865,   866
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*Nset, nset=t35
    76,    77,    78,    79,    80,    81
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*Elset, elset=t35
   121,   122,   123,   124,   125,   126
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*Nset, nset=t25
    59,    60,    67,    68,    73,    74
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*Elset, elset=t25
   109,   110,   111,   112,   113,   114
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*Nset, nset=t20
   444,   445,   459,   460,   461,   477
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*Elset, elset=t20
   775,   776,   777,   778,   805,   806
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*Nset, nset=t14
   542,   543,   564,   565,   591,  1002
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*Elset, elset=t14
  1013,  1014,  1015,  1016,  3301,  3302
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*Nset, nset=t165
     1,     2,     3,     4,     5,     6
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*Elset, elset=t165
     1,     2,     3,     4,     5,     6
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*Elset, elset=t15
  1843,  1844,  1845,  1846,  1847,  1848
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*Nset, nset=s13
    82,    83,    84,    85,    86,    87
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*Elset, elset=s13
   127,   128,   129,   130,   131,   132
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*Nset, nset=t10
    83,    84,    87,   102,   103,   105
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*Elset, elset=t10
   159,   160,   161,   162,   195,   196
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*Nset, nset=t135
   511,   512,   513,   514,   515,   516
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*Elset, elset=t135
   905,   906,   907,   908,   909,   910
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*Nset, nset=t105
     3,     4,     6,     8,    10,    12
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*Elset, elset=t105
    77,    78,    79,    80,    81,    82
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*Nset, nset=_PickedSet6_#2, internal
     2,     3,     5,     6,     7,     8
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*Elset, elset=_PickedSet6_#2, internal, generate
 34863,  84300,      1
*Orientation, name=Ori-2
1., 0., 0., 0., 1., 0.
2, 0.
** Section: s165
*Shell Section, elset=t165, material="Steel - Default", orientation=Ori-2
0.0165, 5
** Section: s105
*Shell Section, elset=t105, material="Steel - Default", orientation=Ori-2
0.0105, 5
** Section: s25
*Shell Section, elset=t25, material="Steel - Default", orientation=Ori-2
0.025, 5
** Section: s35
*Shell Section, elset=t35, material="Steel - Default", orientation=Ori-2
0.035, 5
** Section: s13
*Shell Section, elset=s13, material="Steel - Default", orientation=Ori-2
0.013, 5
** Section: s10
*Shell Section, elset=t10, material="Steel - Default", orientation=Ori-2
0.01, 5
** Region: (s145:t145), (Material Orientation:Picked)
*Elset, elset=_I7, internal
   301,   302,   303,   304,   305,   306
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** Section: s145
*Shell Section, elset=_I7, material="Steel - Default", orientation=Ori-2
0.0145, 5
** Section: s20
*Shell Section, elset=t20, material="Steel - Default", orientation=Ori-2
0.02, 5
** Section: s30
*Shell Section, elset=t30, material="Steel - Default", orientation=Ori-2
0.03, 5
** Section: s135
*Shell Section, elset=t135, material="Steel - Default", orientation=Ori-2
0.0135, 5
** Section: s14
*Shell Section, elset=t14, material="Steel - Default", orientation=Ori-2
0.014, 5
** Section: s15
*Shell Section, elset=t15, material="Steel - Default", orientation=Ori-2
0.015, 5
*Orientation, name=Ori-3
1., 0., 0., 0., 1., 0.
1, 0.
** Region: (s145:t145), (Material Orientation:Picked)
*Elset, elset=_I13, internal, generate
 7201,  7220,     1
** Section: s145
*Shell Section, elset=_I13, material="Steel - Default", orientation=Ori-3
0.0145, 5
** Section: s145
*Shell Section, elset=_PickedSet6_#2, material="Steel - Default", orientation=Ori-3
0.0145, 5
*End Part
**
**
** ASSEMBLY
**
*Assembly, name=Assembly
**
*Instance, name=HoldCargo-1, part=HoldCargo
*End Instance
**
*Node
      1,           0.,        11.79,         31.5
*Node
      2,           0.,        11.79,           0.
*Nset, nset=Bulkhead1, instance=HoldCargo-1
     1,     4,    24,    27,    74,    75
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*Elset, elset=Bulkhead1, instance=HoldCargo-1
     1,    39,   111,   112,   124,   125
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*Nset, nset=Bulkhead2, instance=HoldCargo-1
    19,    22,    42,    45,  4030,  4031
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*Elset, elset=Bulkhead2, instance=HoldCargo-1
    31,    69, 12682, 12684, 12686, 12688
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*Nset, nset=_PickedSet105, internal
 1,
*Nset, nset=_PickedSet106, internal
 2,
*Nset, nset=_PickedSet107, internal
 1,
*Nset, nset=_PickedSet108, internal
 2,
*Nset, nset=_PickedSet124, internal, instance=HoldCargo-1, generate
     1,  79878,      1
*Elset, elset=_PickedSet124, internal, instance=HoldCargo-1, generate
     1,  85501,      1
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*Nset, nset=_PickedSet127, internal
 1,
*Nset, nset=_PickedSet128, internal
 2,
*Elset, elset=_Cargo1_SPOS, internal, instance=HoldCargo-1
  2109,  2110,  2127,  2128,  2129,  2130
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*Surface, type=ELEMENT, name=Cargo1
_Cargo1_SPOS, SPOS
*Elset, elset=_Cargo2_SPOS, internal, instance=HoldCargo-1
  2803,  2804,  2849,  2850,  2883,  2884
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*Surface, type=ELEMENT, name=Cargo2
_Cargo2_SPOS, SPOS
*Elset, elset=_Cargo3_SPOS, internal, instance=HoldCargo-1
   775,   776,   777,   778,   805,   806
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*Surface, type=ELEMENT, name=Cargo3
_Cargo3_SPOS, SPOS
*Elset, elset=_Cargo4_SPOS, internal, instance=HoldCargo-1
   109,   110,   111,   112,   113,   114
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*Surface, type=ELEMENT, name=Cargo4
_Cargo4_SPOS, SPOS
*Elset, elset=_Cargo5_SPOS, internal, instance=HoldCargo-1
  1863,  1864,  1865,  1866,  1903,  1904
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*Surface, type=ELEMENT, name=Cargo5
_Cargo5_SPOS, SPOS
*Elset, elset=_Cargo6_SPOS, internal, instance=HoldCargo-1
   983,   984,   985,   986,   987,   988
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*Surface, type=ELEMENT, name=Cargo6
_Cargo6_SPOS, SPOS
*Elset, elset=_CentralBulkhead1_SPOS, internal, instance=HoldCargo-1
  1013,  1014,  1015,  1016,  3301,  3302
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*Elset, elset=_CentralBulkhead1_SNEG, internal, instance=HoldCargo-1
 29569, 29570, 29571, 29572, 29573, 29574
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*Surface, type=ELEMENT, name=CentralBulkhead1
_CentralBulkhead1_SPOS, SPOS
_CentralBulkhead1_SNEG, SNEG
*Elset, elset=_CentralBulkhead2_SNEG, internal, instance=HoldCargo-1
  1013,  1014,  1015,  1016,  3301,  3302
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*Elset, elset=_CentralBulkhead2_SPOS, internal, instance=HoldCargo-1
 29569, 29570, 29571, 29572, 29573, 29574
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*Surface, type=ELEMENT, name=CentralBulkhead2
_CentralBulkhead2_SNEG, SNEG
_CentralBulkhead2_SPOS, SPOS
*Elset, elset=_Side_Bottom1_SPOS, internal, instance=HoldCargo-1
    69,    70,  1887,  1888,  1889,  1890
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*Surface, type=ELEMENT, name=Side_Bottom1
_Side_Bottom1_SPOS, SPOS
*Elset, elset=_Side_Bottom2_SPOS, internal, instance=HoldCargo-1
    31,    32,   291,   292,   293,   294
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*Surface, type=ELEMENT, name=Side_Bottom2
_Side_Bottom2_SPOS, SPOS
*Elset, elset=_Stiffeners1_SPOS, internal, instance=HoldCargo-1
 30449, 30450, 30451, 30452, 30453, 30454
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*Surface, type=ELEMENT, name=Stiffeners1
_Stiffeners1_SPOS, SPOS
*Elset, elset=_Stiffeners2_SNEG, internal, instance=HoldCargo-1
 30449, 30450, 30451, 30452, 30453, 30454
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*Surface, type=ELEMENT, name=Stiffeners2
_Stiffeners2_SNEG, SNEG
** Constraint: Constraint-1
*Rigid Body, ref node=_PickedSet105, tie nset=Bulkhead1
** Constraint: Constraint-2
*Rigid Body, ref node=_PickedSet106, tie nset=Bulkhead2
*End Assembly
**
** MATERIALS
**
*Material, name="Steel - Default"
*Density
7850.,
*Elastic
 2.06e+11, 0.3
**
** BOUNDARY CONDITIONS
**
** Name: BC-1 Type: Displacement/Rotation
*Boundary
_PickedSet107, 1, 1
_PickedSet107, 2, 2
_PickedSet107, 3, 3
_PickedSet107, 5, 5
_PickedSet107, 6, 6
** Name: BC-2 Type: Displacement/Rotation
*Boundary
_PickedSet108, 1, 1
_PickedSet108, 2, 2
_PickedSet108, 3, 3
_PickedSet108, 5, 5
_PickedSet108, 6, 6
** ----------------------------------------------------------------
**
** STEP: Step-1
**
*Step, name=Step-1, nlgeom=NO
*Static
0.1, 1., 1e-05, 1.
**
** LOADS
**
** Name: CBulkhead1   Type: Pressure Using Field: CargoOil
*Dload, op=NEW
HoldCargo-1.1013, P, -5027.62
HoldCargo-1.1014, P, -5027.62
HoldCargo-1.1015, P, -5027.62
HoldCargo-1.1016, P, -5027.62
HoldCargo-1.3301, P, -5027.62
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HoldCargo-1.30444, P, 22121.6
** Name: CBulkhead2   Type: Pressure Using Field: CargoOil
*Dload, op=NEW
HoldCargo-1.1013, P, 5027.62
HoldCargo-1.1014, P, 5027.62
HoldCargo-1.1015, P, 5027.62
HoldCargo-1.1016, P, 5027.62
HoldCargo-1.3301, P, 5027.62
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HoldCargo-1.30444, P, -22121.6
** Name: Cargo1   Type: Pressure Using Field: CargoOil
*Dload, op=NEW
HoldCargo-1.2109, P, -5253.86
HoldCargo-1.2110, P, -5253.86
HoldCargo-1.2127, P, -12726.2
HoldCargo-1.2128, P, -16748.3
HoldCargo-1.2129, P, -12587.9
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HoldCargo-1.33038, P, -127727.
** Name: Cargo2   Type: Pressure Using Field: CargoOil
*Dload, op=NEW
HoldCargo-1.2803, P, -202930.
HoldCargo-1.2804, P, -202930.
HoldCargo-1.2849, P, -198478.
HoldCargo-1.2850, P, -198478.
HoldCargo-1.2883, P, -194569.
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HoldCargo-1.33062, P, -187456.
** Name: Cargo3   Type: Pressure Using Field: CargoOil
*Dload, op=NEW
HoldCargo-1.775, P, -186207.
HoldCargo-1.776, P, -186207.
HoldCargo-1.777, P, -186207.
HoldCargo-1.778, P, -186207.
HoldCargo-1.805, P, -190660.
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HoldCargo-1.31978, P, -202930.
** Name: Cargo4   Type: Pressure Using Field: CargoOil
*Dload, op=NEW
HoldCargo-1.109, P, -12726.2
HoldCargo-1.110, P, -16748.3
HoldCargo-1.111, P, -12587.9
HoldCargo-1.112, P, -16610.
HoldCargo-1.113, P, -5253.86
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HoldCargo-1.31960, P, -178456.
** Name: Cargo5   Type: Pressure Using Field: CargoOil
*Dload, op=NEW
HoldCargo-1.1863, P, -205429.
HoldCargo-1.1864, P, -205429.
HoldCargo-1.1865, P, -205429.
HoldCargo-1.1866, P, -205429.
HoldCargo-1.1903, P, -205429.
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HoldCargo-1.33054, P, -205429.
** Name: Cargo6   Type: Pressure Using Field: CargoOil
*Dload, op=NEW
HoldCargo-1.983, P, -205429.
HoldCargo-1.984, P, -205429.
HoldCargo-1.985, P, -205429.
HoldCargo-1.986, P, -205429.
HoldCargo-1.987, P, -205429.
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HoldCargo-1.31976, P, -205429.
** Name: HSM2_HOG_RP1   Type: Moment
*Cload
_PickedSet127, 4, 1.38076e+10
** Name: HSM2_HOG_RP2   Type: Moment
*Cload
_PickedSet128, 4, -1.38076e+10
** Name: Hidrostatic1   Type: Pressure Using Field: Hidrostatic
*Dload, op=NEW
HoldCargo-1.69, P, -3494.2
HoldCargo-1.70, P, -3494.2
HoldCargo-1.1887, P, -188636.
HoldCargo-1.1888, P, -188636.
HoldCargo-1.1889, P, -188636.
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HoldCargo-1.33468, P, -188636.
** Name: Hidrostatic2   Type: Pressure Using Field: Hidrostatic
*Dload, op=NEW
HoldCargo-1.31, P, -3494.2
HoldCargo-1.32, P, -3494.2
HoldCargo-1.291, P, -3494.2
HoldCargo-1.292, P, -3494.2
HoldCargo-1.293, P, -3494.2
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HoldCargo-1.33914, P, -11085.9
** Name: Weight   Type: Gravity
*Dload, op=NEW
_PickedSet124, GRAV, 9.81, 0., -1., 0.
**
** OUTPUT REQUESTS
**
*Restart, write, frequency=0
**
** FIELD OUTPUT: F-Output-1
**
*Output, field, variable=PRESELECT
**
** HISTORY OUTPUT: H-Output-1
**
*Output, history, variable=PRESELECT
*End Step
